// SBML level 3 version 1

model main()
  // model units - substance: mole, time: second, volume: litre, area: square_metre, length: metre, extent: mole

  // Compartments:
  compartment default = 1e-6;

  // Species:
  species E in default = 28;
  species B in default = 47;
  species C in default = 17;
  species A in default = 47;
  species F in default = 64;
  species D in default = 15;
  species G in default = 97;

  // Parameters:
  DummyVar_UnimolecularPropensity_k_0 = 3.045;
  DummyVar_MassActionPropensity_k_1 = 1.076;

  // Reactions:
  r0: E => C + B; DummyVar_UnimolecularPropensity_k_0*E;
  r1: C + 2 B + A => F; DummyVar_MassActionPropensity_k_1*C*B^2*A;

  // Unit definitions:
  unit square_metre = metre^2;
end
